<?xml version="1.0" ?>
<propeller name="DJI_9450">
	<ixx>0.000057</ixx>
	<diameter unit="IN">9.0</diameter>
	<numblades>2</numblades>
	<minpitch>4.5</minpitch>
	<maxpitch>4.5</maxpitch>
	<torqueleverarm>0.54</torqueleverarm>
	<table name="C_THRUST" type="internal">
		<tableData>
		0.0 	0.1173
		0.02	0.1155
		0.05	0.1136
		0.07	0.1114
		0.1 	0.1091
		0.12	0.1067
		0.14	0.104
		0.17	0.1012
		0.19	0.0982
		0.22	0.095
		0.24	0.0916
		0.27	0.088
		0.29	0.0842
		0.31	0.0802
		0.34	0.076
		0.36	0.0717
		0.39	0.0673
		0.41	0.0627
		0.43	0.058
		0.46	0.0533
		0.48	0.0484
		0.51	0.0434
		0.53	0.0384
		0.56	0.0332
		0.58	0.0278
		0.6 	0.0224
		0.63	0.0169
		0.65	0.0114
		0.68	0.0057
		0.7 	0.0
		</tableData>
	</table>
	<table name="C_POWER" type="internal">
		<tableData>
		0.0 	0.046
		0.02	0.0462
		0.05	0.0464
		0.07	0.0465
		0.1 	0.0465
		0.12	0.0465
		0.14	0.0464
		0.17	0.0461
		0.19	0.0458
		0.22	0.0454
		0.24	0.0449
		0.27	0.0442
		0.29	0.0434
		0.31	0.0425
		0.34	0.0414
		0.36	0.0401
		0.39	0.0387
		0.41	0.0372
		0.43	0.0355
		0.46	0.0337
		0.48	0.0317
		0.51	0.0295
		0.53	0.0271
		0.56	0.0245
		0.58	0.0217
		0.6 	0.0187
		0.63	0.0156
		0.65	0.0122
		0.68	0.0087
		0.7 	0.0053
		</tableData>
	</table>
</propeller>
