<?xml version="1.0" ?>

<fdm_config release="Alpha" version="2.0">

    <mass_balance file="Mass.xml"/>

    <ground_reactions file="Gear.xml"/>

    <propulsion file="Propulsion.xml"/>

    <metrics file="Metrics.xml"/>

    <aerodynamics file="Aero.xml"/>

</fdm_config>
